# DC DESIGNFORLØB
# Effektforsyningen
# Effektforsyningen planlægges med start ved udgangen. Ved en effekt på 30W i 8Ω skal udgangsspændingen være
# VO RMS = 15,5V med amplituden VO = 22V. Der skal være plads til to basis-emitter strækninger for udgangstrinnet, noget lignende til den øvrige elektronik og ripple i effektforsyningen og 10% på netspændingen så effektforsyningen bør placeres cirka 5V højere end kravet til VO og det giver værdien til +-27V.
P_O := 30 W
R_L := 8 Ω
P_O == V_rms^2/R_L
V_rms := sqrt(P_O*R_L) = 15.4919 V
V_O := V_rms*sqrt(2) = 21.9089 V
V_CC := 1.1*22 V + 2*0.7 V + 2*0.7 V = 27 V
V_EE := -V_CC = -27 V
# Strømniveauet
# Strømniveauet i udgangstrinnet estimeres. Med 8Ω som den nominelle belastning bør der tages udgangspunkt i
# RL = 6Ω da en højttaler har en svingspole der har en DC modstand RDC på typisk 80% af den nominelle værdi.
#
# Strømmens spidsværdi bliver IO PEAK = 3,65A og der må forventes en middelstrøm fra effektforsyningen på
# IDC = 1,16A. Hvis den værdi holder så bliver den tilførte effekt på 62W ved 30W afgivet i nominelt 8Ω og virkningsgraden er 48%.
R_L := 6 Ω
I_OPEAK := V_O/R_L = 3.65148 A
I_DC := I_OPEAK/π = 1.1623 A  # IDC half wave
P_CC := V_CC*V_O/(π*R_L) = 31.3822 W
P_TOT := 2*P_CC = 62.7644 W
η := P_O/P_TOT*100 = 47.7978
# Effekttabet
# Effekttabet i udgangstransistorerne T10 og T11 bliver 24W samlet og derfor forventes et tab på 12W i hver transistor. Det danner udgangspunktet for en senere beregning af køleprofilen.
P_T := (2/π)*V_CC*V_O/R_L - V_O^2/(2*R_L) = 22.7644 W
P_T := 0.4*V_CC^2/(2*R_L) = 24.3 W
# Drivertrinnet
# Drivertrinnet skal levere basisstrømmen til udgangstransistorerne 2N3055 og MJ2955 og med β10 = β11 = 20 som strømforstærkning i T10 og T11 behøves en strøm på 183mA så der afsættes 1/20 af effekttabet i drivertransistorerne T8 og T9 eller 0,6W i hver transistor.
#
# Man bør være meget konservativ og dimensionere efter en transistor der kan håndtere mindst 1W da effekten varierer som funktion af udgangsspændingen. Der bruges en transistor på 10W uden et køleprofil og ellers må man planlægge køling af disse transistorer.
β_10 := 20
I_B := I_OPEAK/β_10 = 182.574 mA
P_TO := P_T/20 = 1.215 W
P_T9 := P_TO/2 = 0.6075 W
# Basisstrømmen
# Basisstrømmen til drivertrinnet er 5 mA ved en strømforstærkning på β8 = β9= 40.
β_8 := 40
I_B := 183 mA/β_8 = 4.575 mA
# Modstanden RE (R7) i strømkilden
I_C == U_BE/R_E solve, R_E → U_BE/I_C
R_E := 0.7 V/(20 mA) = 35 Ω
# Indgangstrinnet
# Indgangstrinnet skal levere basisstrømmen til T5 som med β5 = 420 er på 25 μA. Der bør vælges en mange gange højere strøm i den fælles emitter for at holde differentialtrinnets balance nær ved fifty-fifty så strømmen vælges til
# IE = 5 mA. Det indstilles ved modstanden RE til 5,1kΩ.
I_E := 5 mA
R_E := (27 V - 0.7 V)/I_E = 5.26 kΩ
R_E := 5.1 kΩ
# Forstærkningen
# Forstærkningen indstilles så fuld udstyring på VO RMS = 15,5 V opnås ved ved VI RMS = 0,5 V på indgangen og indstilles af ACL = 1 + R6/R5 = 31. Et valg af R3 = 1 kΩ giver R4 = 30 kΩ.
A_CL := 15.5/0.5 = 31
R_3 := 1 kΩ
A_CL == 1 + R_4/R_3 solve, R_4 → 30*kΩ
# AC DESIGNFORLØB
# Den lave grænsefrekvens
# Den lave grænsefrekvens fastsættes af C1 og R2 til 1,6Hz og kondensator C4 skal blot være ”stor” så spændingsvariationen over den bliver ”lille” i sammenligning med værdien over R5 for at holde forvrængningen nede. Det skyldes at en aluminium elektrolyt kondensator ikke er en lineær komponent.
# En typisk værdi på 100 μF giver 1,6 Hz.
C_1 := 10 μF
C_4 := 100 μF
R_2 := 10 kΩ
R_3 := 1 kΩ
f_1 := 1/(2*π*R_2*C_1) = 1.59155 Hz
f_2 := 1/(2*π*R_3*C_4) = 1.59155 Hz
# Transkonduktansen
# Transkonduktansen gm i differentialtrinnet T1 ... T4 beregnes til 96mS.
I_E := 5 mA
U_T := 26 mV
g_m := I_E/(2*U_T) = 0.0961538 S
# Åben-sløjfe forstærkningen
# Åben-sløjfe forstærkningen beregnes fra transkonduktansen, strømforstærkningen i T5 og indgangsmodstanden på udgangstrinnet ved basis af T8 og T9 der giver et estimat på RC i formlen.
#
# Indgangsmodstanden for en emitterfølger er belastningen RL gange med den samlede strømforstærkning til
# RC = 4,8 kΩ. DC forstærkningen beregnes derefter til ADC = 194 000 ved en belastning på RL = 6 Ω.
β_8 := 40
β_10 := 20
R_C := β_8*β_10*6 Ω = 4.8 kΩ
β_5 := 420
A_DC := g_m*β_5*R_C = 193846
# Kompenseringen
# Kompenseringen skal sikre stabilitet ved at reducere forstærkningen til en ved den laveste af de høje poler der antages givet af RC og Cμ for T5, T8 og T9 i parallel.
#
# Ved en værdi for Cμ på 3 pF findes fH = 11,1 MHz og den dominerende pol f0 findes til 14 Hz. Ved den aktuelle forstærkning på ACL = 31 kan den dominerende pol fP findes til 442 Hz som er tilstrækkelig for stabilitet.
# Ved Miller-transformation findes modstande og kapaciteter, der resulterer i poler.
I_C := 27 V/(4.8 kΩ) = 5.625 mA
r_C := R_C
g_m5 := I_C/U_T = 0.216346 S
A := g_m5*R_C = 1038.46
r_π5 := β_5/g_m5 = 1.94133 kΩ
f_T := 300 MHz*I_C/(10 mA) = 168.75 MHz
C_π5 := g_m/(2*π*f_T) = 90.6866 pF
# Cμ ≈ 1 … 5 pF
C_μ5 := 3*pF
C_MO := C_μ5
C_MI := (1 + A)*C_MO = 3.11838 nF
# Polen ved ind- og udgangen findes.
f_1 := 1/(2*π*r_π5*(C_π5 + C_MI)) = 25.547 kHz
f_2 := 1/(2*π*r_C*C_MO) = 11.0524 MHz
# Den nye dominerende pol findes ud fra den høje pol ved 11,1 MHz.
f_H := f_2
f_0 ≤ f_H*A_CL/(4*A_DC)
f_0 := f_H/(4*A_DC) = 14.2541 Hz
# Den dominerende pol kan hæves med forstærkningen ACL.
f_0 := f_H*A_CL/(4*A_DC) = 441.878 Hz
# Kompenseringskondensatoren kan nu vælges.
C_C := 1/(2*π*f_0*β_5*R_C) = 178.66 pF
C_C := 180*pF
# Slew rate
# Slew rate værdien bliver SR = 28 V/μs der fuldt tilstrækkelig for musikformat som er begrænset til 2 V/μs ved frekvensen 20 kHz.
SR == 2*π*f*V_O == 2*V/μs
SR := I_E/C_C = 27.7778 V/μs  # .
# KØLEPROFIL
# Chiptemperaturen
# Køleprofilet for udgangstransistorerne beregnes ud fra specifikationen af hvad temperaturen på transistorens chip må være ved 12 W afsat effekt. Det benævnes Tj for junction temperature.
#
# Chiptemperaturen må for 2N3055 maksimalt være 185°C ved 12 W afsat effekt, men man bør aldrig gå til grænsen så her fastsættes værdien konservativt til Tj = 100°C. Med en omgivelsestemperatur pa 25°C skal temperaturstigningen holdes nede på 75°C.
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# Den termiske modstand
# Den termiske modstand fra junction til monteringsflade er 1,52°C/W ifølge databladet så kravet bliver omkring
# 4,7 °C/W for køleprofilets termiske modstand til omgivelserne (køleprofilets K værdi).
R_thhs := (100 K - 25 K)/(12 W) - 1.52 K/W = 4.73 K/W
# SOA
# Maksimum ratings for 2N3055 er 115W, 60V og 15A.
# Grænseværdierne bliver derfor:
115 W/(60 V) = 1.91667 A
115 W/(15 A) = 7.66667 V
