# DC DESIGNFORLØB
# Effektforsyningen
# Effektforsyningen planlægges med start ved udgangen. Ved en effekt på 30W i 8Ω skal udgangsspændingen være
# VO RMS = 15,5V med amplituden VO = 22V. Der skal være plads til to basis-emitter strækninger for udgangstrinnet, noget lignende til den øvrige elektronik og ripple i effektforsyningen og 10% på netspændingen så effektforsyningen bør placeres cirka 5V højere end kravet til VO og det giver værdien til +-27V.
P_O := 30 W
R_L := 8 Ω
P_O == V_rms^2/R_L
V_rms := sqrt(R_L*P_O) = 15.4919 V
V_O := V_rms*sqrt(2) = 21.9089 V
V_CC := 1.1*22 V + 2*0.7 V + 2*0.7 V = 27 V
V_EE := -V_CC = -27 V
# Strømniveauet
# Strømniveauet i udgangstrinnet estimeres. Med 8Ω som den nominelle belastning bør der tages udgangspunkt i
# RL = 6Ω. Strømmens spidsværdi bliver IMAX = 3,65A og der må forventes en middelstrøm fra effektforsyningen på
# IDC = 1,16A. Hvis den værdi holder så bliver den tilførte effekt på 67W ved 30W afgivet i nominelt 8Ω og virkningsgraden er 45%.
R_L := 6 Ω
I_MAX := V_O/R_L = 3.65148 A
I_DC := I_MAX/π = 1.1623 A  # IDC half wave
P_CC := V_CC*(I_MAX - I_DC) = 67.2079 W
η := P_O/P_CC*100 = 44.6376
# Effekttabet
# Effekttabet i udgangstransistorerne T9 og T10 bliver VCCVO/πRL = 32W samlet og derfor forventes et tab på 16W i hver transistor. Det danner udgangspunktet for en senere beregning af køleprofilen.
P_CC := V_CC*V_O/(π*R_L) = 31.3822 W
# Forstærkningen
A_CL := 15.5/0.5 = 31
R_5 := 1 kΩ
A_CL == 1 + R_6/R_5 solve, R_6 → 30*kΩ
# Forstærkningen indstilles så fuld udstyring på UO RMS = 15,5 V opnås ved ved UI RMS = 0,5 V på indgangen og indstilles af ACL = 1 + R6/R5 = 31. Et valg af R5 = 1 kΩ giver R6 = 30 kΩ.
# AC DESIGNFORLØB
# Den lave grænsefrekvens
C_1 := 1 μF
R_2 := 24 kΩ
f_1 := 1/(2*π*R_2*C_1) = 6.63146 Hz
f_2 := 1/(2*π*1 kΩ*100 μF) = 1.59155 Hz
# Den lave grænsefrekvens fastsættes af C1 og R2 til 6,6Hz og kondensator C4 skal blot være ”stor” så spændingsvariationen over den bliver ”lille” i sammenligning med værdien over R5 for at holde forvrængningen nede. Det skyldes at en aluminium elektrolyt kondensator ikke er en lineær komponent.
# En typisk værdi på 100 μF giver 1,6 Hz.
# Transkonduktansen
I_E := 5 mA
U_T := 26 mV
g_m := I_E/(2*U_T) = 0.0961538 S
# Transkonduktansen gm i differentialtrinnet T1 ... T4 beregnes til 96 mS.
# Åben-sløjfe forstærkningen
β_7 := 100
β_9 := 30
R_C := 5.1 kΩ
β_5 := 325
A_DC := g_m*β_5*R_C = 159375
# Åben-sløjfe forstærkningen beregnes fra transkonduktansen, strømforstærkningen i T5 og indgangsmodstanden på udgangstrinnet ved basis af T7 og T8 der giver et estimat på RC i formlen. Indgangsmodstanden for en emitterfølger er belastningen RL gange med den samlede strømforstærkning til RC = 18kΩ. DC forstærkningen beregnes derefter
# til ADC = 160 000 ved en belastning på RL = 6 Ω.
# Kompenseringen
C_μ := 10*pF
f_H := 1/(2*π*R_C*C_μ) = 3.12069 MHz
f_0 := f_H/A_DC = 19.5808 Hz
f_P := A_CL*f_0 = 607.004 Hz
C_C := 1/(2*π*f_0*β_5*R_C) = 4.90385 nF
C_C := 1/(2*π*f_P*β_5*R_C) = 158.189 pF
# Kompenseringen skal sikre stabilitet ved at reducere forstærkningen til en ved den laveste af de høje poler der antages givet af RC og Cμ for T5, T7 og T8 i parallel. Antages værdien til 10 pF findes fH = 3,3 MHz og den dominerende pol findes til f0 = fH/ADC = 20 Hz. Ved den aktuelle forstærkning på ACL = 31 kan den dominerende pol haves til
# fP = ACLf0 = 607 Hz som er tilstrækkelig for stabilitet. Herefter beregnes C6 = 1/2πfPβ5RC = 158 pF.
# Slew rate
SR := I_E/C_C = 31.6078 V/μs
# Slew rate værdien bliver SR = IE/C6 = 31 V/μs der fuldt tilstrækkelig for musikformal som er begrænset til
# SR = 2πfUO = 2 V/μs ved frekvensen 20 kHz.
# KØLEPROFIL
# Chiptemperaturen
# Køleprofilet for udgangstransistorerne beregnes ud fra specifikationen af hvad temperaturen på transistorens chip må være ved 16 W afsat effekt. Det benævnes Tj for junction temperature.
#
# Chiptemperaturen må for 2N3055 maksimalt være 180°C ved 16 W afsat effekt, men man bør aldrig gå til grænsen så her fastsættes værdien konservativt til Tj = 100°C. Med en omgivelsestemperatur pa 25°C skal temperaturstigningen holdes nede på 75°C.
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(100 - 25)/16 - 1.52 = 3.1675
# Den termiske modstand
0.657*16 = 10.512
R_K := 10.51 - 1.52*2 = 7.47
# Den termiske modstand fra junction til omgivelser ved PC = 22 W er på 10,5°C/W. Den termiske modstand fra junction til monteringsflade er 1,52°C/W ifølge databladet og der må påregnes en lignende værdi for selve montagen på køleprofilet så kravet bliver omkring 7,5°C/W for køleprofilets termiske modstand til omgivelserne (køleprofilets K værdi).
# SOA
# Maksimum ratings for 2N3055 er 115W, 60V og 15A.
# Grænseværdierne bliver derfor:
115 W/(60 V) = 1.91667 A
115 W/(15 A) = 7.66667 V
